New linecode.Sweetbriar nphases=1 r1=0.5333 x1=0.1399 r0=0.5333 x0=0.1399 units=mi normamps=299 {299 1.25 *} !pos/zero seq resistance/reactance from Dominion SynerGEE DB


!New Linecode.kronkron1/0 nphases=3 rmatrix=[0.201761667 0.018049545 0.018049545 | 0.018049545 0.201761667 0.018049545 | 0.018049545 0.018049545 0.201761667]
!ohms per 1000 ft
!~ xmatrix=[ 0.285770602	0.254451335 0.246486562 | 0.254451335 0.285770602 0.254451335 |  0.246486562 0.254451335 0.285770602]
!~ cmatrix=[15 | -7 15 | -7  -7  15 ] units=kft
!~ Normamps=202  {202 1.25 *}
!~ Neutral=2 Kron=yes    ! eliminate the neutral conductor
!~ Neutral=2 Kron=yes    ! eliminate the neutral conductor

New Linecode.kronkron1/0 nphases=1 rmatrix=0.25386817 xmatrix=0.07582623 cmatrix=15.00000000 normamps=202

New Linecode.1/0-3phase nphases=3 rmatrix=[0.201761667 0.018049545 0.018049545 | 0.018049545 0.201761667 0.018049545 | 0.018049545 0.018049545 0.201761667]
!ohms per 1000 ft
~ xmatrix=[ 0.285770602	0.254451335 0.246486562 | 0.254451335 0.285770602 0.254451335 |  0.246486562 0.254451335 0.285770602]
~ cmatrix=[15 | -7 15 | -7  -7  15 ] units=kft
~ Normamps=202  {202 1.25 *}

!New Linecode.2/0_2/0 nphases=3 rmatrix=[ 0.163693485 0.018049545 0.018049545 | 0.018049545 0.163693485 0.018049545 | 0.018049545 0.018049545 0.163693485]
!ohms per 1000 ft
!~ xmatrix=[0.283040781 0.251744507 0.243779734 | 0.251744507 0.283040781 0.251744507 | 0.243779734 0.251744507 0.283040781]
!~ cmatrix=[15 | -7 15 | -7  -7  15 ] units=kft
!~ Normamps=230  {230 1.25 *}
!~ Neutral=2 Kron=yes    ! eliminate the neutral conductor
!~ Neutral=2 Kron=yes    ! eliminate the neutral conductor

New Linecode.2/0_2/0 nphases=1 rmatrix=0.20348571 xmatrix=0.06809403 cmatrix=15.00000000 normamps=230

New Linecode.2/0_2/0-3ph nphases=3 rmatrix=[ 0.163693485 0.018049545 0.018049545 | 0.018049545 0.163693485 0.018049545 | 0.018049545 0.018049545 0.163693485]
!ohms per 1000 ft
~ xmatrix=[0.283040781 0.251744507 0.243779734 | 0.251744507 0.283040781 0.251744507 | 0.243779734 0.251744507 0.283040781]
~ cmatrix=[15 | -7 15 | -7  -7  15 ] units=kft
~ Normamps=230  {230 1.25 *}

!New Linecode.4/0_4/0 nphases=3 rmatrix=[ 0.109716212 0.018049545 0.018049545 | 0.018049545 0.109716212 0.018049545 | 0.018049545 0.018049545 0.109716212]
!ohms per 1000 ft
!~ xmatrix=[ 0.27765665 0.246417363 0.23845259 | 0.246417363 0.27765665 0.246417363 | 0.23845259 0.246417363 0.27765665]
!~ cmatrix=[15 | -7 15 | -7  -7  15 ] units=kft
!~ Normamps=299  {299 1.25 *}
!~ Neutral=2 Kron=yes    ! eliminate the neutral conductor
!~ Neutral=2 Kron=yes    ! eliminate the neutral conductor

New Linecode.4/0_4/0 nphases=1 rmatrix=0.12983011 xmatrix=0.05932303 cmatrix=15.00000000 normamps=299


New Linecode.4/0_4/0-3ph nphases=3 rmatrix=[ 0.109716212 0.018049545 0.018049545 | 0.018049545 0.109716212 0.018049545 | 0.018049545 0.018049545 0.109716212]
!ohms per 1000 ft
~ xmatrix=[ 0.27765665 0.246417363 0.23845259 | 0.246417363 0.27765665 0.246417363 | 0.23845259 0.246417363 0.27765665]
~ cmatrix=[15 | -7 15 | -7  -7  15 ] units=kft
~ Normamps=299  {299 1.25 *}


New Linecode.500_500-3ph  nphases=3
~ rmatrix=[0.057064697 0.018049545 0.018049545 | 0.018049545 0.057064697 0.018049545 | 0.018049545 0.018049545 0.057064697]
! ohms per 1000 ft
~ xmatrix=[ 0.266209885 0.236235109 0.228270336 | 0.236235109 0.266209885 0.236235109 | 0.228270336 0.236235109 0.266209885]
~ cmatrix=[15 | -7 15 | -7  -7  15 ] units=kft
~ NormAmps=483 {483 1.25 *}

New Linecode.750_750-3ph  nphases=3
~ rmatrix=[0.044375303 0.018049545 0.018049545 | 0.018049545 0.044375303 0.018049545 | 0.018049545 0.018049545 0.044375303]
! ohms per 1000 ft
~ xmatrix=[ 0.261509955 0.248345084 0.240380311 | 0.248345084 0.261509955 0.248345084| 0.240380311 0.248345084 0.261509955]
~ cmatrix=[15 | -7 15 | -7  -7  15 ] units=kft
~ NormAmps=580 {580 1.25 *}


!set to 750 for now - need to verify this is the correct conductor size based on load amperes once loads are attached to the sec_service.dss file
New Linecode.unknown  nphases=3
~ rmatrix=[0.044375303 0.018049545 0.018049545 | 0.018049545 0.044375303 0.018049545 | 0.018049545 0.018049545 0.044375303]
! ohms per 1000 ft
~ xmatrix=[ 0.261509955 0.248345084 0.240380311 | 0.248345084 0.261509955 0.248345084| 0.240380311 0.248345084 0.261509955]
~ cmatrix=[15 | -7 15 | -7  -7  15 ] units=kft
~ NormAmps=580 {580 1.25 *}
